// SBML level 3 version 2

model myelotoxicity_friberg_model_PD()
  // model units - time: hour

  // Compartments:
  compartment central = 3.42 litre;
  compartment peripheral = 22.25 litre;

  // Species:
  species central_drug in central = 0.0000000000001;  // substance in mg
  species peripheral_drug in peripheral = 0;  // substance in mg

  // Parameters:
  circ_0 = 987 per_mL;
  MTT = 84.3 hour;
  gamma = 0.414 dimensionless;
  slope = 0.0837 millilitre_per_mg;
  E_drug has dimensionless;
  prol = 987 per_mL;
  T1 = 987 per_mL;
  T2 = 987 per_mL;
  T3 = 987 per_mL;
  circ = 987 per_mL;
  clearance = 14.38 per_hour;
  k_peripheral = 11.25 per_hour;

  // Assignment rules:
  E_drug := slope*central_drug;

  // Rate rules:
  prol' = 4/MTT*prol*(1 - E_drug)*(circ_0/circ)^gamma - 4/MTT*prol;
  T1' = 4/MTT*prol - 4/MTT*T1;
  T2' = 4/MTT*T1 - 4/MTT*T2;
  T3' = 4/MTT*T2 - 4/MTT*T3;
  circ' = 4/MTT*T3 - 4/MTT*circ;

  // Reactions:
  elimination: central_drug => ; clearance*central_drug*central;
  Central_to_Peripheral: central_drug -> peripheral_drug; k_peripheral*(central_drug*central - peripheral_drug*peripheral);

  // Unit definitions:
  unit hour = 3600 second;
  unit per_hour = 1 / (3600 second);
  unit ml = 1 / (1e-3 litre);
  unit per_litre = 1 / litre;
  unit per_mL = 1 / (1e-3 litre);
  unit mg = 1e-3 gram;
  unit millilitre_per_mg = 1e-3 litre / (1e-3 gram);
end
