// SBML level 3 version 2

model myelotoxicity_friberg_model_PD()
  // model units - time: hour

  // Compartments:
  compartment central = 0.65 litre;

  // Species:
  species drug in central = 1e-9;  // substance in gram

  // Parameters:
  clearance = 2.8 litre_per_hour;
  drug_scale_factor = l.0; drug_scale_factor has dimensionless;
  scaled_drug_concentration has gram_per_litre;

  // Assignment rules:
  scaled_drug_concentration := drug_scale_factor*drug;

  // Reactions:
  elimination: drug => ; clearance*drug;

  // Unit definitions:
  unit hour = 3600 second;
  unit litre_per_hour = litre / (3600 second);
  unit gram_per_litre = gram / litre;
end
