// SBML level 3 version 2

model myelotoxicity_friberg_model_PD()
  // model units - time: hour

  // Compartments:
  compartment central = 0.65 litre;
  compartment peripheral_1 = 4.2 litre;
  compartment peripheral_2 = 0.5 litre;

  // Species:
  species drug_c in central = 1e-9;  // substance in gram
  species drug_p1 in peripheral_1 = 1e-9;  // substance in gram
  species drug_p2 in peripheral_2 = 1e-9;  // substance in gram

  // Parameters:
  clearance = 2.8 litre_per_hour;
  k_peripheral1 = 2.1 litre_per_hour;
  k_peripheral2 = 1.5 litre_per_hour;
  drug_c_scale_factor = l.0; drug_c_scale_factor has dimensionless; drug_c_scale_factor is "drug_scale_factor";
  scaled_drug_c_concentration has gram_per_litre; scaled_drug_c_concentration is "scaled_drug_concentration";

  // Assignment rules:
  scaled_drug_c_concentration := drug_c_scale_factor*drug_c;

  // Reactions:
  elimination: drug_c => ; clearance*drug_c;
  Central_to_Peripheral_1: drug_c -> drug_p1; k_peripheral1*(drug_c - drug_p1);
  Central_to_Peripheral_2: drug_c -> drug_p2; k_peripheral2*(drug_c - drug_p2);

  // Unit definitions:
  unit hour = 3600 second;
  unit litre_per_hour = litre / (3600 second);
  unit gram_per_litre = gram / litre;
end
