// SBML level 3 version 2

model adaptive_antibiotic_model()
  // model units - time: hour

  // Compartments:
  compartment P1 = 7e6 dimensionless;
  compartment P2 = 1 dimensionless;
  compartment Ptotal; Ptotal has dimensionless;
  compartment t = 1 dimensionless;

  // Parameters:
  KNetgrowth = 2.3 per_hour;
  tvbmax = 1e9 dimensionless;
  Kmax = 3.2 per_hour;
  EC50k = 0.5 mg_per_kg;
  gamma = 3.8 dimensionless;
  beta = 44 dimensionless;
  tau = 0.002 ml_per_h_ug;
  alpha = 3.1 per_hour;
  Kdeath = 0.3 per_hour;
  Ksr_max = 2.8 per_hour;
  Drug_concentration = 10 mg_per_kg;

  // Assignment rules:
  Ptotal := P1 + P2;

  // Rate rules:
  P1' = KNetgrowth*P1*(1 - (P1 + P2)/tvbmax) - (Ksr_max/tvbmax*(P1 + P2)*P1 + Kmax*P1*(1 - exp((0 - t)*alpha))*Drug_concentration^gamma/((EC50k*(1 + beta*(1 - exp((0 - Drug_concentration)*tau*t))))^gamma + Drug_concentration^gamma));
  P2' = Ksr_max/tvbmax*(P1 + P2)*P1 - Kdeath*P2;
  t' = 1;

  // Unit definitions:
  unit per_hour = 1 / (3600 second);
  unit hour = 3600 second;
  unit mg_per_kg = 1e-3 gram / (1000 gram);
  unit ml_per_h_ug = 1e-3 litre / (3600 second * 1e-6 gram);
end
