// SBML level 3 version 2

model PK_Model_1065667()
  // model units - substance: substance, time: time, volume: volume, area: area, length: length, extent: substance

  // Parameters:
  Volume_central_compartment = 60 volume;
  A1 = 0 ng; A1 is "Amount central compartment";
  k10 = 0.555 per_hr; k10 is "Elimination rate (1st order)";
  C1 has ng_per_mL; C1 is "Concentration central compartment";

  // Assignment rules:
  C1 := A1/Volume_central_compartment;

  // Rate rules:
  A1' = -(k10*A1);

  // Unit definitions:
  unit length = metre;
  unit area = metre^2;
  unit time = second;
  unit hour = 3600 second;
  unit substance = mole;
  unit per_hr = 1 / (3600 second);
  unit volume = 1e-3 litre;
  unit ng_per_mL = 1e-9 gram / (1e-3 litre);
  unit ng = 1e-9 gram;
end
