// SBML level 3 version 2

model PK_Model_1065667()
  // model units - substance: substance, time: time, volume: volume, area: area, length: length, extent: substance

  // Compartments:
  compartment central = 60;
  compartment peripheral = 45;
  compartment peripheral2 = 45;

  // Species:
  species Amount_central in central = 1e-6;
  species Amount_compartment_2 in peripheral = 1e-6;
  species Amount_compartment_3 in peripheral2 = 1e-6;

  // Parameters:
  Elim_rate_order_1 = 0.555 per_hr;
  Transfer_1_to_2 = 0.898 per_hr;
  Transfer_2_to_1 = 0.634 per_hr;
  Transfer_1_to_3 = 0.358 per_hr;
  Transfer_3_to_1 = 0.574 per_hr;

  // Reactions:
  Central_to_Peripheral: Amount_central => Amount_compartment_2; Transfer_1_to_2*Amount_central*central;
  Peripheral_to_Central: Amount_compartment_2 => Amount_central; Transfer_2_to_1*Amount_compartment_2*peripheral;
  elimination: Amount_central => ; Elim_rate_order_1*Amount_central*central;
  Central_to_Peripheral2: Amount_central => Amount_compartment_3; Transfer_1_to_3*Amount_central*central;
  Peripheral2_to_Central: Amount_compartment_3 => Amount_central; Transfer_2_to_1*Amount_compartment_3*peripheral2;

  // Unit definitions:
  unit length = metre;
  unit area = metre^2;
  unit time = 3600 second;
  unit substance = gram;
  unit per_hr = 1 / (3600 second);
  unit volume = 1e-3 litre;
end
