// SBML level 3 version 2

model PK_Model_1065667()
  // model units - substance: substance, time: time, volume: volume, area: area, length: length, extent: substance

  // Parameters:
  Volume_central_compartment = 60 volume;
  Volume_compartment_2 = 45 volume;
  Volume_compartment_3 = 45 volume;
  A1 = 0 ng; A1 is "Amount central compartment";
  A2 = 0 ng; A2 is "Amount compartment 2";
  A3 = 0 ng; A3 is "Amount compartment 3";
  C1 has ng_per_mL; C1 is "Concentration central compartment";
  Concentration_compartment_2 has ng_per_mL;
  Concentration_compartment_3 has ng_per_mL;
  k10 = 0.555 per_hr; k10 is "Elimination rate (1st order)";
  k12 = 0.898 per_hr; k12 is "Transfer from central to 2";
  k21 = 0.634 per_hr; k21 is "Transfer from 2nd to central";
  k13 = 0.358 per_hr; k13 is "Transfer from central to 3rd";
  k31 = 0.574 per_hr; k31 is "Transfer from 3rd to central";

  // Assignment rules:
  C1 := A1/Volume_central_compartment;
  Concentration_compartment_2 := A2/Volume_compartment_2;
  Concentration_compartment_3 := A3/Volume_compartment_3;

  // Rate rules:
  A1' = k31*A3 + k21*A2 - (k10*A1 + k12*A1 + k13*A1);
  A2' = k12*A1 - k21*A2;
  A3' = k13*A1 - k31*A3;

  // Unit definitions:
  unit length = metre;
  unit area = metre^2;
  unit time = second;
  unit hour = 3600 second;
  unit substance = mole;
  unit per_hr = 1 / (3600 second);
  unit volume = 1e-3 litre;
  unit ng_per_mL = 1e-9 gram / (1e-3 litre);
  unit ng = 1e-9 gram;
end
