// SBML level 3 version 2

model PK_Model_1065667()
  // model units - substance: substance, time: time, volume: volume, area: area, length: length, extent: substance

  // Parameters:
  V1 = 60 volume;
  V2 = 45 volume;
  A1 = 0 ng;
  A2 = 0 ng;
  C1 has ng_per_mL;
  C2 has ng_per_mL;
  k10 = 0.555 per_hr;
  k12 = 0.898 per_hr;
  k21 = 0.634 per_hr;

  // Assignment rules:
  C1 := A1/V1;
  C2 := A2/V2;

  // Rate rules:
  A1' = k21*A2 - (k10*A1 + k12*A1);
  A2' = k12*A1 - k21*A2;

  // Unit definitions:
  unit length = metre;
  unit area = metre^2;
  unit time = second;
  unit hour = 3600 second;
  unit substance = mole;
  unit per_hr = 1 / (3600 second);
  unit volume = 1e-3 litre;
  unit ng_per_mL = 1e-9 gram / (1e-3 litre);
  unit ng = 1e-9 gram;
end
