// SBML level 3 version 2

model adaptive_antibiotic_model()
  // model units - time: hour

  // Compartments:
  compartment P1 = 7e6 item;
  compartment P2 = 1 item;
  compartment Ptotal; Ptotal has item;
  compartment t = 1 hour;

  // Parameters:
  KNetgrowth = 2.3 per_hour;
  tvbmax = 1e9 item;
  Kmax = 3.2 per_hour;
  EC50k = 0.5 ug_per_mL;
  gamma = 3.8 dimensionless;
  beta = 44 dimensionless;
  tau = 0.002 mL_per_h_ug;
  Kdeath = 0.3 per_hour;
  Ksr_max = 2.8 per_hour;
  Drug_concentration = 10 ug_per_mL;

  // Assignment rules:
  Ptotal := P1 + P2;

  // Rate rules:
  P1' = minus(KNetgrowth*P1*(1 - (P1 + P2)/tvbmax), Ksr_max/tvbmax*(P1 + P2)*P1, Kmax*P1*Drug_concentration^gamma/((EC50k*(1 + beta*(1 - exp((0 - Drug_concentration)*tau*t))))^gamma + Drug_concentration^gamma));
  P2' = Ksr_max/tvbmax*(P1 + P2)*P1 - Kdeath*P2;
  t' = 1;

  // Unit definitions:
  unit per_hour = 1 / (3600 second);
  unit hour = 3600 second;
  unit mg_per_kg = 1e-3 gram / (1000 gram);
  unit ug_per_mL = 1e-6 gram / (1e-3 liter);
  unit mL_per_h_ug = 1e-3 litre / (3600 second * 1e-6 gram);
end
