// SBML level 3 version 2

model TMDD_OneCompartment()
  // model units - time: day

  // Compartments:
  compartment L = 1 nM;
  compartment R = 1 nM;
  compartment P = 1 nM;
  compartment t = 1 day;

  // Parameters:
  Ltotal has nM;
  Rtotal has nM;
  Kel = 0.024 per_day;
  Kep = 0.201 per_day;
  Kout = 0.823 per_day;
  Koff = 0.9 per_day;
  Kon = 0.592 per_nM_day;
  Kin = 2.2122 nM_per_day;
  Vc = 0.04 L_per_kg;

  // Assignment rules:
  Ltotal := L + P;
  Rtotal := R + P;

  // Rate rules:
  L' = Koff*P - Kel*L - Kon*L*R;
  R' = Kin - Kout*R - Kon*L*R + Koff*P;
  P' = Kon*L*R - Koff*P - Kep*P;
  t' = 1;

  // Unit definitions:
  unit per_day = 1 / (86400 second);
  unit day = 86400 second;
  unit nM = 1e-9 mole;
  unit nM_per_day = 1e-9 mole / (86400 second);
  unit per_nM_day = 1 / (1e-9 mole * 86400 second);
  unit L_per_kg = liter / (1000 gram);
end
